<?xml version="1.0" ?>
<!--Test case 1: Upper border is fixed and only heavy gravity is applied -->

<Node name="root" dt="0.01" showBoundingTree="0" gravity="0 -10 0">
	<Node name="RequiredPlugins">
		<RequiredPlugin pluginName="Sofa.Component.Collision.Detection.Algorithm"/> <!-- Needed to use components [BVHNarrowPhase, BruteForceBroadPhase, DefaultPipeline] -->
		<RequiredPlugin pluginName="Sofa.Component.Collision.Detection.Intersection"/> <!-- Needed to use components [MinProximityIntersection] -->
		<RequiredPlugin pluginName="Sofa.Component.Collision.Geometry"/> <!-- Needed to use components [TriangleCollisionModel] -->
		<RequiredPlugin pluginName="Sofa.Component.Collision.Response.Contact"/> <!-- Needed to use components [CollisionResponse] -->
		<RequiredPlugin pluginName="Sofa.Component.Constraint.Projective"/> <!-- Needed to use components [FixedConstraint] -->
		<RequiredPlugin pluginName="Sofa.Component.Engine.Select"/> <!-- Needed to use components [BoxROI] -->
		<RequiredPlugin pluginName="Sofa.Component.IO.Mesh"/> <!-- Needed to use components [MeshGmshLoader] -->
		<RequiredPlugin pluginName="Sofa.Component.LinearSolver.Iterative"/> <!-- Needed to use components [CGLinearSolver] -->
		<RequiredPlugin pluginName="Sofa.Component.Mapping.Linear"/> <!-- Needed to use components [IdentityMapping] -->
		<RequiredPlugin pluginName="Sofa.Component.Mass"/> <!-- Needed to use components [DiagonalMass] -->
        <RequiredPlugin pluginName="Sofa.Component.MechanicalLoad"/> <!-- Needed to use components [PlaneForceField] -->
		<RequiredPlugin pluginName="Sofa.Component.IntegrationScheme.Backward"/> <!-- Needed to use components [EulerImplicitIntegrationScheme] -->
		<RequiredPlugin pluginName="Sofa.Component.SceneUtility"/> <!-- Needed to use components [InfoComponent] -->
		<RequiredPlugin pluginName="Sofa.Component.SolidMechanics.FEM.Elastic"/> <!-- Needed to use components [TriangularFEMForceField] -->
		<RequiredPlugin pluginName="Sofa.Component.SolidMechanics.Spring"/> <!-- Needed to use components [TriangularBendingSprings] -->
		<RequiredPlugin pluginName="Sofa.Component.StateContainer"/> <!-- Needed to use components [MechanicalObject] -->
		<RequiredPlugin pluginName="Sofa.Component.Topology.Container.Dynamic"/> <!-- Needed to use components [TriangleSetGeometryAlgorithms, TriangleSetTopologyContainer, TriangleSetTopologyModifier] -->
		<RequiredPlugin pluginName="Sofa.Component.Visual"/> <!-- Needed to use components [VisualStyle] -->
		<RequiredPlugin pluginName="Sofa.GL.Component.Rendering3D"/> <!-- Needed to use components [OglModel] -->
		<RequiredPlugin pluginName="Tearing"/>
	</Node>

    <VisualStyle displayFlags="showVisual showBehaviorModels" />

    <DefaultAnimationLoop />
    <CollisionPipeline verbose="0" />
    <BruteForceBroadPhase/>
    <BVHNarrowPhase/>
    <CollisionResponse response="PenalityContactForceField" />
    <MinProximityIntersection name="Proximity" alarmDistance="0.8" contactDistance="0.5" />

    <Node name="SquareGravity_FEM">
        <EulerImplicitIntegrationScheme name="cg_odesolver" printLog="false"  rayleighStiffness="0.1" rayleighMass="0.1" />
        <CGLinearSolver iterations="25" name="linearSolver" tolerance="1.0e-9" threshold="1.0e-9" />
        <MeshGmshLoader name="meshLoader" filename="mesh/square3.msh" scale="10" createSubelements="true" />

        <TriangleSetTopologyContainer  name="Container" src="@meshLoader" fileTopology="" tags=" " />
        <TriangleSetTopologyModifier   name="Modifier" />
        <TriangleSetGeometryAlgorithms name="GeomAlgo"   template="Vec3d" />

        <MechanicalObject name="Mo"/>
        <DiagonalMass massDensity="2.0" />

        <BoxROI name="FixedSide" box="-0.1 9.9 0.1  10.1 10.1 -0.1" drawBoxes="1" />
        <FixedProjectiveConstraint name="FixedConstraint" indices="@FixedSide.indices" />

        <TriangularFEMForceField name="FEM" youngModulus="300" poissonRatio="0.3" method="large" computePrincipalStress="1"/>
        <TriangularBendingSprings name="FEM-Bend" stiffness="300" />
        <PlaneForceField normal="0 1 0" d="-20" stiffness="100000" showPlane="1" showPlaneSize="20"/>

        <TriangleCollisionModel />

        <TearingEngine name="TearingEngine" input_position="@Mo.position" stressThreshold="6.0"
            step="30" nbFractureMax="40" showFracturePath="1" fractureMaxLength="1.0"/>

        <Node >
            <OglModel name="Visual" color="red" />
            <IdentityMapping input="@.." output="@Visual" />
        </Node>
    </Node>

    <!--
    <Node name="SquareGravity_FEM_optim">
        <EulerImplicitIntegrationScheme name="cg_odesolver" printLog="false"  rayleighStiffness="0.1" rayleighMass="0.1" />
        <CGLinearSolver iterations="25" name="linearSolver" tolerance="1.0e-9" threshold="1.0e-9" />
        <MeshGmshLoader name="meshLoader" filename="mesh/square3.msh" scale="10" createSubelements="true" translation="10 0 0"/>

        <TriangleSetTopologyContainer  name="Container" src="@meshLoader" fileTopology="" tags=" " />
        <TriangleSetTopologyModifier   name="Modifier" />
        <TriangleSetGeometryAlgorithms name="GeomAlgo"   template="Vec3d" />

        <MechanicalObject name="Mo"/>
        <DiagonalMass massDensity="10.0" />

        <BoxROI name="FixedSide" box="9.9 9.9 0.1 20.1 10.1 -0.1" drawBoxes="1" />
        <FixedProjectiveConstraint name="FixedConstraint" indices="@FixedSide.indices" />

        <TriangularFEMForceFieldOptim name="FEM" youngModulus="60" poissonRatio="0.3" method="large"  />
        <TriangularBendingSprings name="FEM-Bend" stiffness="300" />
        <PlaneForceField normal="0 1 0" d="-20" stiffness="100000" showPlane="1" showPlaneSize="20"/>

        <TriangleCollisionModel />

        <TearingEngine name="TearingEngine" input_position="@Mo.position" stressThreshold="30.0"
            step="30" nbFractureMax="40" showFracturePath="1"/>

        <Node >
            <OglModel name="Visual" color="blue" />
            <IdentityMapping input="@.." output="@Visual" />
        </Node>
    </Node>
    -->

</Node>
