<?xml version="1.0" ?>
<!--Test case 3: Upper border is fixed and constant pulling force is applied to middle of bottom border -->

<Node name="root" dt="0.05" showBoundingTree="0" gravity="0 0 0">
	<Node name="RequiredPlugins">
		<RequiredPlugin pluginName="Sofa.Component.Collision.Detection.Algorithm"/> <!-- Needed to use components [BVHNarrowPhase, BruteForceBroadPhase, DefaultPipeline] -->
		<RequiredPlugin pluginName="Sofa.Component.Collision.Detection.Intersection"/> <!-- Needed to use components [MinProximityIntersection] -->
		<RequiredPlugin pluginName="Sofa.Component.Collision.Geometry"/> <!-- Needed to use components [TriangleCollisionModel] -->
		<RequiredPlugin pluginName="Sofa.Component.Collision.Response.Contact"/> <!-- Needed to use components [CollisionResponse] -->
		<RequiredPlugin pluginName="Sofa.Component.Constraint.Projective"/> <!-- Needed to use components [FixedConstraint] -->
		<RequiredPlugin pluginName="Sofa.Component.Engine.Select"/> <!-- Needed to use components [BoxROI] -->
		<RequiredPlugin pluginName="Sofa.Component.IO.Mesh"/> <!-- Needed to use components [MeshGmshLoader] -->
		<RequiredPlugin pluginName="Sofa.Component.LinearSolver.Iterative"/> <!-- Needed to use components [CGLinearSolver] -->
		<RequiredPlugin pluginName="Sofa.Component.Mapping.Linear"/> <!-- Needed to use components [IdentityMapping] -->
		<RequiredPlugin pluginName="Sofa.Component.Mass"/> <!-- Needed to use components [DiagonalMass] -->
		<RequiredPlugin pluginName="Sofa.Component.MechanicalLoad"/> <!-- Needed to use components [ConstantForceField] -->
		<RequiredPlugin pluginName="Sofa.Component.IntegrationScheme.Backward"/> <!-- Needed to use components [EulerImplicitIntegrationScheme] -->
		<RequiredPlugin pluginName="Sofa.Component.SceneUtility"/> <!-- Needed to use components [InfoComponent] -->
		<RequiredPlugin pluginName="Sofa.Component.SolidMechanics.FEM.Elastic"/> <!-- Needed to use components [TriangularFEMForceField] -->
		<RequiredPlugin pluginName="Sofa.Component.SolidMechanics.Spring"/> <!-- Needed to use components [TriangularBendingSprings] -->
		<RequiredPlugin pluginName="Sofa.Component.StateContainer"/> <!-- Needed to use components [MechanicalObject] -->
		<RequiredPlugin pluginName="Sofa.Component.Topology.Container.Dynamic"/> <!-- Needed to use components [TriangleSetGeometryAlgorithms, TriangleSetTopologyContainer, TriangleSetTopologyModifier] -->
		<RequiredPlugin pluginName="Sofa.Component.Visual"/> <!-- Needed to use components [VisualStyle] -->
		<RequiredPlugin pluginName="Sofa.GL.Component.Rendering3D"/> <!-- Needed to use components [OglModel] -->
		<RequiredPlugin pluginName="Tearing"/>
	</Node>

    <VisualStyle displayFlags="showVisual showBehaviorModels" />

    <DefaultAnimationLoop />
    <CollisionPipeline verbose="0" />
    <BruteForceBroadPhase/>
    <BVHNarrowPhase/>
    <CollisionResponse response="PenalityContactForceField" />
    <MinProximityIntersection name="Proximity" alarmDistance="0.8" contactDistance="0.5" />

    <Node name="SquareGravity">
        <EulerImplicitIntegrationScheme name="cg_odesolver" printLog="false"  rayleighStiffness="0.1" rayleighMass="0.1" />
        <CGLinearSolver iterations="25" name="linearSolver" tolerance="1.0e-9" threshold="1.0e-9" />
        <MeshGmshLoader name="meshLoader" filename="mesh/square3.msh" scale="10" createSubelements="true" />

		<TriangleSetTopologyContainer  name="Container" src="@meshLoader"  />
		<TriangleSetTopologyModifier   name="Modifier" />
		<TriangleSetGeometryAlgorithms name="GeomAlgo"   template="Vec3d" showEdgeIndices="1" showTriangleIndices="1" showIndicesScale="0.001"/>

        <MechanicalObject name="Mo"/>
        <DiagonalMass massDensity="0.15" />

		<BoxROI name="FixedSide" box="-0.1 9.9 0.1 10.1 10.1 -0.1" drawBoxes="1" />
		<FixedProjectiveConstraint name="FixedConstraint" indices="@FixedSide.indices" />

		<BoxROI template="Vec3d" name="PullMiddle" box="4.9 4.95 0.1  5.1 5.1 0.1" drawBoxes="1"/>
		<!--<BoxROI template="Vec3d" name="PulledSide" box="-0.1 0.1 0.1  10.1 -0.1 -0.1" drawBoxes="1"/>-->
		<ConstantForceField name="CFF" indices="772" forces="0 -500 0" showArrowSize=".01" />

		<TriangularFEMForceField name="FEM" youngModulus="300" poissonRatio="0.3" method="large" computePrincipalStress="true"/>
        <TriangularBendingSprings name="FEM-Bend" stiffness="300" damping="1.0" />
        <PlaneForceField normal="0 1 0" d="-30" stiffness="100000" showPlane="1" showPlaneSize="20"/>

        <TriangleCollisionModel />
		<TearingEngine name="TearingEngine" input_position="@Mo.position" stressThreshold="15.0"
            step="20" nbFractureMax="40" showFracturePath="1" showTearableCandidates="1" fractureMaxLength="1.0"/>

        <Node >
            <OglModel name="Visual" color="gray" />
            <IdentityMapping input="@.." output="@Visual" />
        </Node>
    </Node>
</Node>
