<?xml version="1.0" ?>
<!--Scenario 06:
 - Square tissue mesh has a big circular hole in the middle. Upper border is fixed and and constant pulling force is applied to bottom border.
 - Input cut: diagonal cut starting from the hole.
 -->

<Node name="root" dt="0.05" showBoundingTree="0" gravity="0 0 0">
    <Node name="RequiredPlugins">
        <RequiredPlugin name="Sofa.Component.Collision.Detection.Algorithm"/> <!-- Needed to use components [BVHNarrowPhase, BruteForceBroadPhase, DefaultPipeline] -->
        <RequiredPlugin name="Sofa.Component.Collision.Detection.Intersection"/> <!-- Needed to use components [MinProximityIntersection] -->
        <RequiredPlugin name="Sofa.Component.Collision.Geometry"/> <!-- Needed to use components [TriangleCollisionModel] -->
        <RequiredPlugin name="Sofa.Component.Collision.Response.Contact"/> <!-- Needed to use components [CollisionResponse] -->
        <RequiredPlugin name="Sofa.Component.Constraint.Projective"/> <!-- Needed to use components [FixedConstraint] -->
        <RequiredPlugin name="Sofa.Component.Engine.Select"/> <!-- Needed to use components [BoxROI] -->
        <RequiredPlugin name="Sofa.Component.IO.Mesh"/> <!-- Needed to use components [MeshGmshLoader] -->
        <RequiredPlugin name="Sofa.Component.LinearSolver.Iterative"/> <!-- Needed to use components [CGLinearSolver] -->
        <RequiredPlugin name="Sofa.Component.Mapping.Linear"/> <!-- Needed to use components [IdentityMapping] -->
        <RequiredPlugin name="Sofa.Component.Mass"/> <!-- Needed to use components [DiagonalMass] -->
        <RequiredPlugin name="Sofa.Component.MechanicalLoad"/> <!-- Needed to use components [ConstantForceField] -->
        <RequiredPlugin name="Sofa.Component.ODESolver.Backward"/> <!-- Needed to use components [EulerImplicitSolver] -->
        <RequiredPlugin name="Sofa.Component.SceneUtility"/> <!-- Needed to use components [InfoComponent] -->
        <RequiredPlugin name="Sofa.Component.SolidMechanics.FEM.Elastic"/> <!-- Needed to use components [TriangularFEMForceField] -->
        <RequiredPlugin name="Sofa.Component.SolidMechanics.Spring"/> <!-- Needed to use components [TriangularBendingSprings] -->
        <RequiredPlugin name="Sofa.Component.StateContainer"/> <!-- Needed to use components [MechanicalObject] -->
        <RequiredPlugin name="Sofa.Component.Topology.Container.Dynamic"/> <!-- Needed to use components [TriangleSetGeometryAlgorithms, TriangleSetTopologyContainer, TriangleSetTopologyModifier] -->
        <RequiredPlugin name="Sofa.Component.Visual"/> <!-- Needed to use components [VisualStyle] -->
        <RequiredPlugin name="Sofa.GL.Component.Rendering3D"/> <!-- Needed to use components [OglModel] -->
        <RequiredPlugin name="Tearing"/>
    </Node>


    <VisualStyle displayFlags="showVisual showBehaviorModels" />
    <DefaultAnimationLoop />
    <CollisionPipeline verbose="0" />
    <BruteForceBroadPhase/>
    <BVHNarrowPhase/>
    <CollisionResponse response="PenalityContactForceField" />
    <MinProximityIntersection name="Proximity" alarmDistance="0.8" contactDistance="0.5" />

    <Node name="SquareGravity">
        <EulerImplicitSolver name="cg_odesolver" printLog="false"  rayleighStiffness="0.1" rayleighMass="0.1" />
        <CGLinearSolver iterations="25" name="linear solver" tolerance="1.0e-9" threshold="1.0e-9" />
 		<MeshOBJLoader name="meshLoader" filename="../TearingEngine/mesh/square_tissue_hole_circle.obj" scale="1" createSubelements="true" />

		<TriangleSetTopologyContainer  name="Container" src="@meshLoader" fileTopology="" tags=" " />
		<TriangleSetTopologyModifier   name="Modifier" />
		<TriangleSetGeometryAlgorithms name="GeomAlgo"   template="Vec3d" />

        <MechanicalObject name="Mo"/>
        <DiagonalMass massDensity="0.15" />

		<!--<StressDetector name='StressDetector'/>-->

		<BoxROI name="FixedSide" box="-0.1 9.9 0.1 10.1 10.1 -0.1" drawBoxes="1" />
		<FixedProjectiveConstraint name="FixedConstraint" indices="@FixedSide.indices" />

		<BoxROI template="Vec3d" name="PulledSide" box="-0.1 0.1 0.1  10.1 -0.1 -0.1" drawBoxes="1"/>
		<ConstantForceField name="CFF" indices="@PulledSide.indices" forces="0 -100 0" showArrowSize=".01" />

		<TearingScenarioEngine name="TearingEngine" input_position="@Mo.position"
			startVertexId="282" startDirection="0.707 -0.707 0.0" startLength="5.0"/>

		<TriangularFEMForceField name="FEM" youngModulus="60" poissonRatio="0.3" method="large" computePrincipalStress="true"/>
        <TriangularBendingSprings name="FEM-Bend" stiffness="300" damping="1.0" />
        <TriangleCollisionModel />

        <Node >
            <OglModel name="Visual" color="red" />
            <IdentityMapping input="@.." output="@Visual" />
        </Node>
    </Node>
</Node>
