<?xml version="1.0" ?>
<!--Test case 3: Upper border is fixed and constant pulling force is applied to middle of bottom border -->

<Node name="root" dt="0.05" showBoundingTree="0" gravity="0 0 0">
	<Node name="RequiredPlugins">
		<RequiredPlugin name="Sofa.Component.Collision.Detection.Algorithm"/> <!-- Needed to use components [BVHNarrowPhase, BruteForceBroadPhase, DefaultPipeline] -->
		<RequiredPlugin name="Sofa.Component.Collision.Detection.Intersection"/> <!-- Needed to use components [MinProximityIntersection] -->
		<RequiredPlugin name="Sofa.Component.Collision.Geometry"/> <!-- Needed to use components [TriangleCollisionModel] -->
		<RequiredPlugin name="Sofa.Component.Collision.Response.Contact"/> <!-- Needed to use components [CollisionResponse] -->
		<RequiredPlugin name="Sofa.Component.Constraint.Projective"/> <!-- Needed to use components [FixedConstraint] -->
		<RequiredPlugin name="Sofa.Component.Engine.Select"/> <!-- Needed to use components [BoxROI] -->
		<RequiredPlugin name="Sofa.Component.IO.Mesh"/> <!-- Needed to use components [MeshGmshLoader] -->
		<RequiredPlugin name="Sofa.Component.LinearSolver.Iterative"/> <!-- Needed to use components [CGLinearSolver] -->
		<RequiredPlugin name="Sofa.Component.Mapping.Linear"/> <!-- Needed to use components [IdentityMapping] -->
		<RequiredPlugin name="Sofa.Component.Mass"/> <!-- Needed to use components [DiagonalMass] -->
		<RequiredPlugin name="Sofa.Component.MechanicalLoad"/> <!-- Needed to use components [ConstantForceField] -->
		<RequiredPlugin name="Sofa.Component.ODESolver.Backward"/> <!-- Needed to use components [EulerImplicitSolver] -->
		<RequiredPlugin name="Sofa.Component.SceneUtility"/> <!-- Needed to use components [InfoComponent] -->
		<RequiredPlugin name="Sofa.Component.SolidMechanics.FEM.Elastic"/> <!-- Needed to use components [TriangularFEMForceField] -->
		<RequiredPlugin name="Sofa.Component.SolidMechanics.Spring"/> <!-- Needed to use components [TriangularBendingSprings] -->
		<RequiredPlugin name="Sofa.Component.StateContainer"/> <!-- Needed to use components [MechanicalObject] -->
		<RequiredPlugin name="Sofa.Component.Topology.Container.Dynamic"/> <!-- Needed to use components [TriangleSetGeometryAlgorithms, TriangleSetTopologyContainer, TriangleSetTopologyModifier] -->
		<RequiredPlugin name="Sofa.Component.Visual"/> <!-- Needed to use components [VisualStyle] -->
		<RequiredPlugin name="Sofa.GL.Component.Rendering3D"/> <!-- Needed to use components [OglModel] -->
		<RequiredPlugin name="tearing"/>
	</Node>

    <VisualStyle displayFlags="showVisual showBehaviorModels" />

    <DefaultAnimationLoop />
    <DefaultPipeline verbose="0" />
    <BruteForceBroadPhase/>
    <BVHNarrowPhase/>
    <CollisionResponse response="PenalityContactForceField" />
    <MinProximityIntersection name="Proximity" alarmDistance="0.8" contactDistance="0.5" />

    <Node name="SquareGravity">
        <EulerImplicitSolver name="cg_odesolver" printLog="false"  rayleighStiffness="0.1" rayleighMass="0.1" />
        <CGLinearSolver iterations="25" name="linear solver" tolerance="1.0e-9" threshold="1.0e-9" />
        <MeshOBJLoader name="meshLoader" filename="mesh/square1.obj" scale="10" createSubelements="true" />

		<TriangleSetTopologyContainer  name="Container" src="@meshLoader" fileTopology="" tags=" " />
		<TriangleSetTopologyModifier   name="Modifier" />
		<TriangleSetGeometryAlgorithms name="GeomAlgo"   template="Vec3d" showPointIndices="1" showEdgeIndices="1" showTriangleIndices="1" printLog="1"/>

        <MechanicalObject name="Mo"/>
        <DiagonalMass massDensity="0.15" />

		<BoxROI name="FixedSide" box="-0.1 9.9 0.1 10.1 10.1 -0.1" drawBoxes="1" />
		<FixedConstraint name="FixedConstraint" indices="@FixedSide.indices" />

		<BoxROI template="Vec3d" name="PullMiddle" box="4.9 4.95 0.1  5.1 5.1 0.1" drawBoxes="1"/>
		<!--<BoxROI template="Vec3d" name="PulledSide" box="-0.1 0.1 0.1  10.1 -0.1 -0.1" drawBoxes="1"/>
        <TrianglePressureForceField name="PFF" normal="0 0 1" dmin="0.9" dmax="1.1" pressure="1 0 0" />-->
		<ConstantForceField name="CFF" indices="16" forces="0 -300 0" showArrowSize=".01" />

		<TriangularFEMForceField name="FEM" youngModulus="100" poissonRatio="0.3" method="large" computePrincipalStress="true" showStressVector="true"/>
        <TriangularBendingSprings name="FEM-Bend" stiffness="300" damping="1.0" />
        <PlaneForceField normal="0 1 0" d="-30" stiffness="100000" showPlane="1" showPlaneSize="20"/>

        <TriangleCollisionModel />
		<TearingEngine name="TearingEngine" input_position="@Mo.position" stressThreshold="0.1"
            step="20" nbFractureMax="4" showFracturePath="1" showTearableCandidates="1" />

        <Node >
            <OglModel name="Visual" color="gray" />
            <IdentityMapping input="@.." output="@Visual" />
        </Node>
    </Node>
</Node>
