<!-- Mechanical MassSpring Group Basic Example -->
<Node name="root" dt="0.05" showBoundingTree="0" gravity="0 -9 1">
    <RequiredPlugin name="SofaOpenglVisual"/>
    <RequiredPlugin name='SofaMiscFem'/>
    <RequiredPlugin name='SofaGeneralDeformable'/>
    <RequiredPlugin name='SofaImplicitOdeSolver'/>

    <VisualStyle displayFlags="showVisual showBehaviorModels" />
    <DefaultPipeline verbose="0" />
    <BruteForceDetection name="N2" />
    <DefaultContactManager response="PenalityContactForceField" />
    <MinProximityIntersection name="Proximity" alarmDistance="0.8" contactDistance="0.5" />
    <Node name="SquareGravity">
        <EulerImplicitSolver name="cg_odesolver" printLog="false"  rayleighStiffness="0.1" rayleighMass="0.1" />
        <CGLinearSolver iterations="25" name="linear solver" tolerance="1.0e-9" threshold="1.0e-9" />
        <MeshGmshLoader name="meshLoader" filename="mesh/square3.msh" scale="10" createSubelements="true" />
        <include href="Objects/TriangleSetTopology.xml" src="@meshLoader" />
        <MechanicalObject name="Mo"/>
        <DiagonalMass massDensity="0.15" />
        <FixedConstraint indices="0 1" />
        <TriangularFEMForceField name="FEM" youngModulus="60" poissonRatio="0.3" method="large" />
        <TriangularBendingSprings name="FEM-Bend" stiffness="300" damping="1.0" />
        <TriangleCollisionModel />
        <Node >
            <OglModel name="Visual" color="red" />
            <IdentityMapping input="@.." output="@Visual" />
        </Node>
    </Node>
</Node>
